*HEADING
Nayak Ex.1 isotropic plate, center patch step load, OpenSG-RM S4
*NODE
1, 0.00000000, 0.00000000, 0.0
2, 0.07070000, 0.00000000, 0.0
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*ELEMENT, TYPE=S4, ELSET=EALL
1, 1, 2, 23, 22
2, 2, 3, 24, 23
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*NSET, NSET=NCEN
221
*NSET, NSET=NX0
1, 22, 43, 64, 85, 106
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*NSET, NSET=NXA
21, 42, 63, 84, 105, 126
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*NSET, NSET=NY0
1, 2, 3, 4, 5, 6
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*NSET, NSET=NYB
421, 422, 423, 424, 425, 426
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*NSET, NSET=NALL, GENERATE
1, 441, 1
*SHELL GENERAL SECTION, ELSET=EALL, DENSITY=0.2
2.197802e-01, 6.593407e-02, 2.197802e-01, 0.000000e+00, 0.000000e+00, 7.692308e-02, 4.787945e-20, 4.286911e-19
0.000000e+00, 7.326007e-04, 4.286911e-19, -7.146035e-19, 0.000000e+00, 2.197802e-04, 7.326007e-04, 0.000000e+00
0.000000e+00, -2.201670e-19, 0.000000e+00, 0.000000e+00, 2.564103e-04
*TRANSVERSE SHEAR STIFFNESS
6.773365e-02, 6.773365e-02, -9.079505e-18
** HARD simple support (the Navier / Reismann-Lee BC): w = 0
** plus the TANGENTIAL rotation zero on every edge -- at x-edges
** phi_y = UR1 (dof 4), at y-edges phi_x = UR2 (dof 5).  Soft SS
** (rotations free) runs several % more flexible at h/b = 0.2.
*BOUNDARY
NX0, 2, 4
NXA, 2, 4
NY0, 1, 1
NYB, 1, 1
NY0, 3, 3
NYB, 3, 3
NY0, 5, 5
NYB, 5, 5
NALL, 6, 6
*AMPLITUDE, NAME=FT
0., 1., 9, 1.
*STEP, NAME=PULSE, INC=400
*DYNAMIC
0.045, 9, 4.5e-06, 0.045
*DLOAD, AMPLITUDE=FT
127, P, 1.000000e+00
128, P, 1.000000e+00
129, P, 1.000000e+00
130, P, 1.000000e+00
131, P, 1.000000e+00
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274, P, 1.000000e+00
*NODE PRINT, NSET=NCEN, FREQUENCY=1
U
*END STEP
