*HEADING
Nayak Ex.2 (0/90/0) a=5h, CONVENTIONAL Abaqus S4 composite section (FSDT), step pulse
*NODE
1, 0.00000000, 0.00000000, 0.0
2, 0.03810000, 0.00000000, 0.0
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*ELEMENT, TYPE=S4, ELSET=EALL
1, 1, 2, 23, 22
2, 2, 3, 24, 23
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*NSET, NSET=NCEN
221
*NSET, NSET=NX0
1, 22, 43, 64, 85, 106
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*NSET, NSET=NXA
21, 42, 63, 84, 105, 126
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*NSET, NSET=NY0
1, 2, 3, 4, 5, 6
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*NSET, NSET=NYB
421, 422, 423, 424, 425, 426
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*NSET, NSET=NALL, GENERATE
1, 441, 1
*MATERIAL, NAME=GE25
*ELASTIC, TYPE=LAMINA
1.723690e+11, 6.895000e+09, 0.25, 3.448000e+09, 3.448000e+09, 1.379000e+09
*DENSITY
1603.03,
*SHELL SECTION, ELSET=EALL, COMPOSITE
0.0508, 3, GE25, 0
0.0508, 3, GE25, 90
0.0508, 3, GE25, 0
** SS-1 + drilling
*BOUNDARY
NX0, 2, 3
NXA, 2, 3
NY0, 1, 1
NYB, 1, 1
NY0, 3, 3
NYB, 3, 3
NALL, 6, 6
*AMPLITUDE, NAME=FT
0., 1., 0.006, 1., 0.006001, 0., 0.02, 0.
*STEP, NAME=PULSE, INC=800
*DYNAMIC
5e-05, 0.02, 5e-09, 5e-05
*DLOAD, AMPLITUDE=FT
1, P, 4.244297e+05
2, P, 1.262838e+06
3, P, 2.070151e+06
4, P, 2.826491e+06
5, P, 3.513232e+06
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400, P, 4.244297e+05
*NODE PRINT, NSET=NCEN, FREQUENCY=1
U
*END STEP
