*HEADING
Nayak Ex.2 / Khdeir-Reddy 1989 (0/90/0) a=5h, OpenSG-RM 8x8 shell, step pulse
*NODE
1, 0.00000000, 0.00000000, 0.0
2, 0.03810000, 0.00000000, 0.0
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*ELEMENT, TYPE=S4, ELSET=EALL
1, 1, 2, 23, 22
2, 2, 3, 24, 23
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*NSET, NSET=NCEN
221
*ELSET, ELSET=PATCHC
190, 191, 210, 211
*NSET, NSET=NX0
1, 22, 43, 64, 85, 106
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*NSET, NSET=NXA
21, 42, 63, 84, 105, 126
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*NSET, NSET=NY0
1, 2, 3, 4, 5, 6
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*NSET, NSET=NYB
421, 422, 423, 424, 425, 426
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*NSET, NSET=NALL, GENERATE
1, 441, 1
*SHELL GENERAL SECTION, ELSET=EALL, DENSITY=244.302
1.790773e+10, 2.633579e+08, 9.480579e+09, 5.324696e-09, 5.106893e-07, 5.254752e+08, 7.961031e-08, 2.356865e-09
5.573255e-27, 4.915834e+07, 3.288188e-09, 3.562393e-08, 9.627031e-25, 5.097240e+05, 3.851182e+06, 1.176287e-26
9.627031e-25, 1.291586e-09, 1.145094e-12, 1.098254e-10, 1.017047e+06
*TRANSVERSE SHEAR STIFFNESS
2.452363e+08, 2.657691e+08, -9.854692e-05
** SS-1 + drilling
*BOUNDARY
NX0, 2, 3
NXA, 2, 3
NY0, 1, 1
NYB, 1, 1
NY0, 3, 3
NYB, 3, 3
NALL, 6, 6
*AMPLITUDE, NAME=FT
0., 1., 0.006, 1., 0.006001, 0., 0.02, 0.
*STEP, NAME=PULSE, INC=800
*DYNAMIC
5e-05, 0.02, 5e-09, 5e-05
*DLOAD, AMPLITUDE=FT
1, P, 4.244297e+05
2, P, 1.262838e+06
3, P, 2.070151e+06
4, P, 2.826491e+06
5, P, 3.513232e+06
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400, P, 4.244297e+05
*NODE PRINT, NSET=NCEN, FREQUENCY=1
U
*EL PRINT, ELSET=PATCHC, FREQUENCY=1
SF, SM
*EL PRINT, ELSET=PATCHC, FREQUENCY=1
COORD
*NODE PRINT, NSET=NALL, FREQUENCY=15
U
*EL PRINT, ELSET=EALL, FREQUENCY=15
SF, SM
*END STEP
