*HEADING
Nayak Ex.2 (0/90/0) a=5h, 3-D C3D8I benchmark, step pulse
*NODE
1, 0.00000000, 0.00000000, 0.00000000
2, 0.03810000, 0.00000000, 0.00000000
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*ELEMENT, TYPE=C3D8I
1, 1, 2, 23, 22, 442, 443, 464, 463
2, 2, 3, 24, 23, 443, 444, 465, 464
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*ELSET, ELSET=PLY1, GENERATE
1, 2400, 1
*ELSET, ELSET=PLY2, GENERATE
2401, 4800, 1
*ELSET, ELSET=PLY3, GENERATE
4801, 7200, 1
*NSET, NSET=NCEN3D
4190
*ELSET, ELSET=COLC
190, 191, 210, 211, 590, 591
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*NSET, NSET=FX0
1, 22, 43, 64, 85, 106
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*NSET, NSET=FXA
21, 42, 63, 84, 105, 126
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*NSET, NSET=FY0
1, 2, 3, 4, 5, 6
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*NSET, NSET=FYB
421, 422, 423, 424, 425, 426
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*MATERIAL, NAME=GE25
*ELASTIC, TYPE=ENGINEERING CONSTANTS
1.723690e+11, 6.895000e+09, 6.895000e+09, 0.25, 0.25, 0.25, 3.448000e+09, 3.448000e+09,
1.379000e+09
*DENSITY
1603.03,
*ORIENTATION, NAME=OR1, SYSTEM=RECTANGULAR
1.0, 0.0, 0.0, 0.0, 1.0, 0.0
3, 0
*SOLID SECTION, ELSET=PLY1, MATERIAL=GE25, ORIENTATION=OR1
*ORIENTATION, NAME=OR2, SYSTEM=RECTANGULAR
1.0, 0.0, 0.0, 0.0, 1.0, 0.0
3, 90
*SOLID SECTION, ELSET=PLY2, MATERIAL=GE25, ORIENTATION=OR2
*ORIENTATION, NAME=OR3, SYSTEM=RECTANGULAR
1.0, 0.0, 0.0, 0.0, 1.0, 0.0
3, 0
*SOLID SECTION, ELSET=PLY3, MATERIAL=GE25, ORIENTATION=OR3
** SS-1 (same rule as the shells)
*BOUNDARY
FX0, 2, 3
FXA, 2, 3
FY0, 1, 1
FYB, 1, 1
FY0, 3, 3
FYB, 3, 3
*AMPLITUDE, NAME=FT
0., 1., 0.006, 1., 0.006001, 0., 0.02, 0.
*STEP, NAME=PULSE, INC=800
*DYNAMIC
5e-05, 0.02, 5e-09, 5e-05
*DLOAD, AMPLITUDE=FT
6801, P2, 4.244297e+05
6802, P2, 1.262838e+06
6803, P2, 2.070151e+06
6804, P2, 2.826491e+06
6805, P2, 3.513232e+06
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7200, P2, 4.244297e+05
*NODE PRINT, NSET=NCEN3D, FREQUENCY=1
U
*EL PRINT, ELSET=COLC, POSITION=CENTROIDAL, FREQUENCY=10
S
*END STEP
