*HEADING
Nayak Ex.3 / Pagano sandwich (0/core/0), a/h=10, OpenSG-RM S4 STATIC
*NODE
1, 0.00000000, 0.00000000, 0.0
2, 0.05000000, 0.00000000, 0.0
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*ELEMENT, TYPE=S4, ELSET=EALL
1, 1, 2, 23, 22
2, 2, 3, 24, 23
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*NSET, NSET=NCEN
221
*ELSET, ELSET=PATCHC
190, 191, 210, 211
*ELSET, ELSET=PATCHO
1, 2, 21, 22
*ELSET, ELSET=PATCHX
181, 182, 201, 202
*ELSET, ELSET=PATCHY
10, 30, 11, 31
*NSET, NSET=NX0
1, 22, 43, 64, 85, 106
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*NSET, NSET=NXA
21, 42, 63, 84, 105, 126
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*NSET, NSET=NY0
1, 2, 3, 4, 5, 6
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*NSET, NSET=NYB
421, 422, 423, 424, 425, 426
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*NSET, NSET=NALL, GENERATE
1, 441, 1
*SHELL GENERAL SECTION, ELSET=EALL, DENSITY=1.0
3.477152e+09, 4.041581e+07, 1.616632e+08, 0.000000e+00, 0.000000e+00, 7.771920e+07, -1.264394e-08, -8.160732e-09
0.000000e+00, 7.034932e+06, -3.969781e-09, -6.258934e-09, 0.000000e+00, 7.335961e+04, 2.934384e+05, 0.000000e+00
0.000000e+00, -1.142072e-10, 0.000000e+00, 0.000000e+00, 1.448002e+05
*TRANSVERSE SHEAR STIFFNESS
4.175472e+07, 4.103092e+07, 4.138042e-07
** SS-1 + drilling
*BOUNDARY
NX0, 2, 3
NXA, 2, 3
NY0, 1, 1
NYB, 1, 1
NY0, 3, 3
NYB, 3, 3
NALL, 6, 6
*STEP, NAME=BEND
*STATIC
1., 1.
*DLOAD
1, P, 6.155830e+01
2, P, 1.831591e+02
3, P, 3.002500e+02
4, P, 4.099476e+02
5, P, 5.095511e+02
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400, P, 6.155830e+01
*NODE PRINT, NSET=NCEN
U
*EL PRINT, ELSET=PATCHC
SF, SM
*EL PRINT, ELSET=PATCHC
COORD
*EL PRINT, ELSET=PATCHO
SF, SM
*EL PRINT, ELSET=PATCHO
COORD
*EL PRINT, ELSET=PATCHX
SF, SM
*EL PRINT, ELSET=PATCHX
COORD
*EL PRINT, ELSET=PATCHY
SF, SM
*EL PRINT, ELSET=PATCHY
COORD
*END STEP
