*HEADING
Nayak Ex.4 cantilever sandwich 0_pm45_90_Al -- OpenSG-RM (MSG ABDG) S4 frequency extraction
** a=0.152 b=0.076 rho_h=4.33 kg/m^2
*NODE
1, 0.00000000, 0.00000000, 0.0
2, 0.00633333, 0.00000000, 0.0
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*ELEMENT, TYPE=S4, ELSET=EALL
1, 1, 2, 27, 26
2, 2, 3, 28, 27
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*NSET, NSET=NROOT
1, 26, 51, 76, 101, 126, 151, 176, 201, 226, 251, 276
301
*NSET, NSET=NALL, GENERATE
1, 325, 1
*SHELL GENERAL SECTION, ELSET=EALL, DENSITY=4.33
1.332655e+08, 4.070885e+07, 1.332655e+08, 5.317202e-10, 2.842777e-09, 4.627832e+07, -3.783205e-12, -1.054090e-11
-2.758523e-13, 5.016861e+01, -1.554312e-11, 2.470831e-12, 4.079672e-13, 1.243648e+01, 3.203825e+01, -4.520946e-13
-2.312697e-13, 3.705933e-12, 1.510863e+00, 1.510863e+00, 1.382245e+01
*TRANSVERSE SHEAR STIFFNESS
1.088855e+07, 2.197080e+07, -1.981167e+06
** clamp the x = 0 edge; drilling dof fixed (flat plate)
*BOUNDARY
NROOT, 1, 6
NALL, 6, 6
*STEP, NAME=MODES
*FREQUENCY
8,
*END STEP
