*HEADING
Nayak Ex.4 cantilever pm45x2_Al -- conventional Abaqus composite S4 (FSDT) frequency
*NODE
1, 0.00000000, 0.00000000, 0.0
2, 0.00633333, 0.00000000, 0.0
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*ELEMENT, TYPE=S4, ELSET=EALL
1, 1, 2, 27, 26
2, 2, 3, 28, 27
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*NSET, NSET=NROOT
1, 26, 51, 76, 101, 126, 151, 176, 201, 226, 251, 276
301
*NSET, NSET=NALL, GENERATE
1, 325, 1
*MATERIAL, NAME=GE
*ELASTIC, TYPE=LAMINA
1.280000e+11, 1.100000e+10, 0.25, 4.480000e+09, 4.480000e+09, 1.530000e+09
*DENSITY
1500,
*MATERIAL, NAME=AL
*ELASTIC, TYPE=LAMINA
6.890000e+10, 6.890000e+10, 0.3, 2.650000e+10, 2.650000e+10, 2.650000e+10
*DENSITY
2770,
*SHELL SECTION, ELSET=EALL, COMPOSITE
0.00013, 3, GE, 45
0.00013, 3, GE, -45
0.00013, 3, GE, 45
0.00013, 3, GE, -45
0.001, 3, AL, 0
0.00013, 3, GE, -45
0.00013, 3, GE, 45
0.00013, 3, GE, -45
0.00013, 3, GE, 45
*BOUNDARY
NROOT, 1, 6
NALL, 6, 6
*STEP, NAME=MODES
*FREQUENCY
8,
*END STEP
