*HEADING
Nayak Ex.4 cantilever pm45x2_Al -- 3-D C3D8I frequency benchmark
*NODE
1, 0.00000000, 0.00000000, 0.00000000
2, 0.00633333, 0.00000000, 0.00000000
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*ELEMENT, TYPE=C3D8I
1, 1, 2, 27, 26, 326, 327, 352, 351
2, 2, 3, 28, 27, 327, 328, 353, 352
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*ELSET, ELSET=LAY1, GENERATE
1, 288, 1
*ELSET, ELSET=LAY2, GENERATE
289, 576, 1
*ELSET, ELSET=LAY3, GENERATE
577, 864, 1
*ELSET, ELSET=LAY4, GENERATE
865, 1152, 1
*ELSET, ELSET=LAY5, GENERATE
1153, 1440, 1
*ELSET, ELSET=LAY6, GENERATE
1441, 1728, 1
*ELSET, ELSET=LAY7, GENERATE
1729, 2016, 1
*ELSET, ELSET=LAY8, GENERATE
2017, 2304, 1
*ELSET, ELSET=LAY9, GENERATE
2305, 2592, 1
*NSET, NSET=NROOT
1, 26, 51, 76, 101, 126
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*MATERIAL, NAME=GE
*ELASTIC, TYPE=ENGINEERING CONSTANTS
1.280000e+11, 1.100000e+10, 1.100000e+10, 0.25, 0.25, 0.25, 4.480000e+09, 4.480000e+09,
1.530000e+09
*DENSITY
1500,
*MATERIAL, NAME=AL
*ELASTIC, TYPE=ENGINEERING CONSTANTS
6.890000e+10, 6.890000e+10, 6.890000e+10, 0.3, 0.3, 0.3, 2.650000e+10, 2.650000e+10,
2.650000e+10
*DENSITY
2770,
*ORIENTATION, NAME=OR1, SYSTEM=RECTANGULAR
1.0, 0.0, 0.0, 0.0, 1.0, 0.0
3, 45
*SOLID SECTION, ELSET=LAY1, MATERIAL=GE, ORIENTATION=OR1
*ORIENTATION, NAME=OR2, SYSTEM=RECTANGULAR
1.0, 0.0, 0.0, 0.0, 1.0, 0.0
3, -45
*SOLID SECTION, ELSET=LAY2, MATERIAL=GE, ORIENTATION=OR2
*ORIENTATION, NAME=OR3, SYSTEM=RECTANGULAR
1.0, 0.0, 0.0, 0.0, 1.0, 0.0
3, 45
*SOLID SECTION, ELSET=LAY3, MATERIAL=GE, ORIENTATION=OR3
*ORIENTATION, NAME=OR4, SYSTEM=RECTANGULAR
1.0, 0.0, 0.0, 0.0, 1.0, 0.0
3, -45
*SOLID SECTION, ELSET=LAY4, MATERIAL=GE, ORIENTATION=OR4
*ORIENTATION, NAME=OR5, SYSTEM=RECTANGULAR
1.0, 0.0, 0.0, 0.0, 1.0, 0.0
3, 0
*SOLID SECTION, ELSET=LAY5, MATERIAL=AL, ORIENTATION=OR5
*ORIENTATION, NAME=OR6, SYSTEM=RECTANGULAR
1.0, 0.0, 0.0, 0.0, 1.0, 0.0
3, -45
*SOLID SECTION, ELSET=LAY6, MATERIAL=GE, ORIENTATION=OR6
*ORIENTATION, NAME=OR7, SYSTEM=RECTANGULAR
1.0, 0.0, 0.0, 0.0, 1.0, 0.0
3, 45
*SOLID SECTION, ELSET=LAY7, MATERIAL=GE, ORIENTATION=OR7
*ORIENTATION, NAME=OR8, SYSTEM=RECTANGULAR
1.0, 0.0, 0.0, 0.0, 1.0, 0.0
3, -45
*SOLID SECTION, ELSET=LAY8, MATERIAL=GE, ORIENTATION=OR8
*ORIENTATION, NAME=OR9, SYSTEM=RECTANGULAR
1.0, 0.0, 0.0, 0.0, 1.0, 0.0
3, 45
*SOLID SECTION, ELSET=LAY9, MATERIAL=GE, ORIENTATION=OR9
*BOUNDARY
NROOT, 1, 3
*STEP, NAME=MODES
*FREQUENCY
8,
*END STEP
