*HEADING
Transient sandwich plate, OpenSG-RM 8x8 shell (see README.md)
** a = b = 0.5 m, h = 0.05 m, [0/core/0] 0.1h/0.8h/0.1h
** step pressure q0 = 10000 Pa held; dt = 5e-05 s, T = 0.025 s
*NODE
1, 0.00000000, 0.00000000, 0.0
2, 0.02500000, 0.00000000, 0.0
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*ELEMENT, TYPE=S4, ELSET=EALL
1, 1, 2, 23, 22
2, 2, 3, 24, 23
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*NSET, NSET=NCEN
221
*ELSET, ELSET=PATCHC
190, 191, 210, 211
*ELSET, ELSET=PATCHX
181, 182, 201, 202
*ELSET, ELSET=PATCHY
10, 30, 11, 31
*NSET, NSET=NX0
1, 22, 43, 64, 85, 106
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*NSET, NSET=NXA
21, 42, 63, 84, 105, 126
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*NSET, NSET=NY0
1, 2, 3, 4, 5, 6
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*NSET, NSET=NYB
421, 422, 423, 424, 425, 426
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*NSET, NSET=NALL, GENERATE
1, 441, 1
**
*SHELL GENERAL SECTION, ELSET=EALL, DENSITY=20
1.338128e+09, 2.289300e+07, 1.269007e+08, 0.000000e+00, 0.000000e+00, 6.636600e+07, -4.386537e-09, 1.249362e-10
0.000000e+00, 6.715510e+05, 1.363876e-10, 1.051025e-10, 0.000000e+00, 1.161561e+04, 5.584379e+04, 0.000000e+00
0.000000e+00, -1.464816e-10, 0.000000e+00, 0.000000e+00, 3.211755e+04
*TRANSVERSE SHEAR STIFFNESS
5.492716e+06, 5.427811e+06, 1.214081e-07
**
** SS-1 simple supports + drilling (orthotropic layup)
*BOUNDARY
NX0, 2, 3
NXA, 2, 3
NY0, 1, 1
NYB, 1, 1
NY0, 3, 3
NYB, 3, 3
NALL, 6, 6
*AMPLITUDE, NAME=STEPL
0., 1., 0.025, 1.
**
*STEP, NAME=PULSE, INC=1000
*DYNAMIC
5e-05, 0.025, 5e-09, 5e-05
*DLOAD, AMPLITUDE=STEPL
1, P, 1.000000e+04
2, P, 1.000000e+04
3, P, 1.000000e+04
4, P, 1.000000e+04
5, P, 1.000000e+04
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400, P, 1.000000e+04
*OUTPUT, FIELD, FREQUENCY=20
*ELEMENT OUTPUT
SF, SM
*NODE OUTPUT
U
*NODE PRINT, NSET=NCEN, FREQUENCY=1
U
*EL PRINT, ELSET=PATCHC, FREQUENCY=1
SF, SM
*EL PRINT, ELSET=PATCHC, FREQUENCY=1
COORD
*EL PRINT, ELSET=PATCHX, FREQUENCY=1
SF, SM
*EL PRINT, ELSET=PATCHX, FREQUENCY=1
COORD
*EL PRINT, ELSET=PATCHY, FREQUENCY=1
SF, SM
*EL PRINT, ELSET=PATCHY, FREQUENCY=1
COORD
*END STEP
