*HEADING
Transient sandwich plate, 3-D SOLID benchmark (see README.md)
** 20 x 20 x 12 C3D8I; same BCs/load/time as sandwich_RM
*NODE
1, 0.00000000, 0.00000000, 0.00000000
2, 0.02500000, 0.00000000, 0.00000000
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*ELEMENT, TYPE=C3D8I
1, 1, 2, 23, 22, 442, 443, 464, 463
2, 2, 3, 24, 23, 443, 444, 465, 464
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*ELSET, ELSET=LAY1
1, 2, 3, 4, 5, 6
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*ELSET, ELSET=LAY2
801, 802, 803, 804, 805, 806
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*ELSET, ELSET=LAY3
4001, 4002, 4003, 4004, 4005, 4006
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*NSET, NSET=NCEN3D
2867
*ELSET, ELSET=COLC
190, 191, 210, 211, 590, 591
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*ELSET, ELSET=COLX
181, 201, 581, 601, 981, 1001
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*ELSET, ELSET=COLY
10, 11, 410, 411, 810, 811
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*NSET, NSET=NX0F
1, 22, 43, 64, 85, 106
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*NSET, NSET=NXAF
21, 42, 63, 84, 105, 126
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*NSET, NSET=NY0F
1, 2, 3, 4, 5, 6
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*NSET, NSET=NYBF
421, 422, 423, 424, 425, 426
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**
*MATERIAL, NAME=FACE
*ELASTIC, TYPE=ENGINEERING CONSTANTS
1.310000e+11, 1.034000e+10, 1.034000e+10, 0.22, 0.22, 0.22, 6.205000e+09, 6.205000e+09,
3.000000e+09
*DENSITY
1600,
*MATERIAL, NAME=CORE
*ELASTIC, TYPE=ENGINEERING CONSTANTS
5.776000e+08, 5.776000e+08, 5.776000e+08, 0.0025, 0.0025, 0.0025, 1.079000e+08, 1.079000e+08,
1.079000e+08
*DENSITY
100,
*ORIENTATION, NAME=OR1, SYSTEM=RECTANGULAR
1.0, 0.0, 0.0, 0.0, 1.0, 0.0
3, 0
*SOLID SECTION, ELSET=LAY1, MATERIAL=FACE, ORIENTATION=OR1
*ORIENTATION, NAME=OR2, SYSTEM=RECTANGULAR
1.0, 0.0, 0.0, 0.0, 1.0, 0.0
3, 0
*SOLID SECTION, ELSET=LAY2, MATERIAL=CORE, ORIENTATION=OR2
*ORIENTATION, NAME=OR3, SYSTEM=RECTANGULAR
1.0, 0.0, 0.0, 0.0, 1.0, 0.0
3, 0
*SOLID SECTION, ELSET=LAY3, MATERIAL=FACE, ORIENTATION=OR3
**
** SS-1 simple supports (same rule as the shell)
*BOUNDARY
NX0F, 2, 3
NXAF, 2, 3
NY0F, 1, 1
NYBF, 1, 1
NY0F, 3, 3
NYBF, 3, 3
*AMPLITUDE, NAME=STEPL
0., 1., 0.025, 1.
**
*STEP, NAME=PULSE, INC=1000
*DYNAMIC
5e-05, 0.025, 5e-09, 5e-05
*DLOAD, AMPLITUDE=STEPL
4401, P2, 1.000000e+04
4402, P2, 1.000000e+04
4403, P2, 1.000000e+04
4404, P2, 1.000000e+04
4405, P2, 1.000000e+04
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4800, P2, 1.000000e+04
*OUTPUT, FIELD, FREQUENCY=50
*ELEMENT OUTPUT
S
*NODE OUTPUT
U
*NODE PRINT, NSET=NCEN3D, FREQUENCY=1
U
*EL PRINT, ELSET=COLC, POSITION=CENTROIDAL, FREQUENCY=20
S
*EL PRINT, ELSET=COLX, POSITION=CENTROIDAL, FREQUENCY=20
S
*EL PRINT, ELSET=COLY, POSITION=CENTROIDAL, FREQUENCY=20
S
*END STEP
